// COMSOL Multiphysics 6.1.0.282 model "PiezoElectricalDiaphragm.mph"
// Outline of the model tree

Geometry
  geom1 "Geometry 1" (2D axisymmetric, length unit µm)
    r1: Rectangle | size = {100, 5}
    r2: Rectangle "Piezo" | pos = {0, 5}; size = {50, 3}
    fin: Finalize "Form Union"

Materials
  mat1: Common "Si - Polycrystalline silicon" on domains 1
    def "Basic"
      thermalexpansioncoefficient = 2.6e-6[1/K]
      heatcapacity = 678[J/(kg*K)]
      relpermittivity = 4.5
      density = 2320[kg/m^3]
      thermalconductivity = 34[W/(m*K)]
    Enu "Young's modulus and Poisson's ratio"
      E = 160e9[Pa]
      nu = 0.22
  mat2: Common "Lead Zirconate Titanate (PZT-2)" on domains 2
    def "Basic"
      relpermittivity = diag{504.1, 504.1, 270}
      density = 7600[kg/m^3]
    StrainCharge "Strain-charge form"
      sE = {1.16e-011[1/Pa], -3.33e-012[1/Pa], -4.97e-012[1/Pa], 0[1/Pa], 0[1/Pa], 0[1/Pa], -3.33e-012[1/Pa], 1.16e-011[1/Pa], -4.97e-012[1/Pa], 0[1/Pa], 0[1/Pa], 0[1/Pa], -4.97e-012[1/Pa], -4.97e-012[1/Pa], 1.48e-011[1/Pa], 0[1/Pa], 0[1/Pa], 0[1/Pa], 0[1/Pa], 0[1/Pa], 0[1/Pa], 4.5e-011[1/Pa], 0[1/Pa], 0[1/Pa], 0[1/Pa], 0[1/Pa], 0[1/Pa], 0[1/Pa], 4.5e-011[1/Pa], 0[1/Pa], 0[1/Pa], 0[1/Pa], 0[1/Pa], 0[1/Pa], 0[1/Pa], 2.99e-011[1/Pa]}
      dET = {0[C/N], 0[C/N], -6e-011[C/N], 0[C/N], 0[C/N], -6e-011[C/N], 0[C/N], 0[C/N], 1.52e-010[C/N], 0[C/N], 4.4e-010[C/N], 0[C/N], 4.4e-010[C/N], 0[C/N], 0[C/N], 0[C/N], 0[C/N], 0[C/N]}
      epsilonrT = diag{990, 990, 450}
      eta_sE = {0, 0, 0, 0, 0, 0, 0, 0, 0, 0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}
      eta_dET = {0, 0, 0, 0, 0, 0, 0, 0, 0, 0, 0, 0, 0, 0, 0, 0, 0, 0}
      eta_epsilonT = 0
    StressCharge "Stress-charge form"
      cE = {1.34868e+011[Pa], 6.78883e+010[Pa], 6.80876e+010[Pa], 0[Pa], 0[Pa], 0[Pa], 6.78883e+010[Pa], 1.34868e+011[Pa], 6.80876e+010[Pa], 0[Pa], 0[Pa], 0[Pa], 6.80876e+010[Pa], 6.80876e+010[Pa], 1.13297e+011[Pa], 0[Pa], 0[Pa], 0[Pa], 0[Pa], 0[Pa], 0[Pa], 2.22222e+010[Pa], 0[Pa], 0[Pa], 0[Pa], 0[Pa], 0[Pa], 0[Pa], 2.22222e+010[Pa], 0[Pa], 0[Pa], 0[Pa], 0[Pa], 0[Pa], 0[Pa], 3.34448e+010[Pa]}
      eES = {0[C/m^2], 0[C/m^2], -1.81603[C/m^2], 0[C/m^2], 0[C/m^2], -1.81603[C/m^2], 0[C/m^2], 0[C/m^2], 9.05058[C/m^2], 0[C/m^2], 9.77778[C/m^2], 0[C/m^2], 9.77778[C/m^2], 0[C/m^2], 0[C/m^2], 0[C/m^2], 0[C/m^2], 0[C/m^2]}
      epsilonrS = diag{504.1, 504.1, 270}
      eta_cE = {0, 0, 0, 0, 0, 0, 0, 0, 0, 0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}
      eta_eES = {0, 0, 0, 0, 0, 0, 0, 0, 0, 0, 0, 0, 0, 0, 0, 0, 0, 0}
      eta_epsilonS = 0

Physics
  solid: SolidMechanics on all domains
    dependent variable u = {u, v, w}
    lemm1: LinearElasticModel "Linear Elastic Material 1" (default)
    axi1: AxialSymmetrySolid "Axial Symmetry 1" (default)
    free1: Free (default)
    init1: init "Initial Values 1" (default)
    pzm1: PiezoelectricMaterialModel "Piezoelectric Material 1" on domains 2
    fix1: Fixed "Fixed Constraint 1" on boundaries 8
  es: Electrostatics on domains 2
    dependent variable V
    ccn1: ChargeConservation (default)
    axi1: AxialSymmetry (default)
    zc1: ZeroCharge (default)
    init1: init "Initial Values 1" (default)
    ccnp1: ChargeConservationPiezo "Charge Conservation, Piezoelectric 1" on domains 2
    gnd1: Ground on boundaries 4
    pot1: ElectricPotential on boundaries 5 | V0 = 500

Multiphysics
  pze1: PiezoelectricEffect on all domains | Solid_physics = solid; Electrostatics_physics = es

Mesh
  mesh1 "Mesh 1" (physics-controlled)

Studies
  std1 "Study 1"
    stat: Stationary
    time: Transient "Time Dependent" | tlist = range(0,4e-4,0.16)

Solver configurations
  sol1 "Solution 1" (study std1)
    v1: Variables "Dependent Variables 1"
    s1: Stationary "Stationary Solver 1"
      dDef: Direct
      fc1: FullyCoupled | linsolver = dDef

Datasets
  dset1: Solution | solution = sol1
  rev1: Revolve2D "Revolution 2D 1" | data = dset1; startangle = -90; revangle = 225
  rev2: Revolve2D "Revolution 2D 2" | data = dset1

Plots
  pg1: PlotGroup2D "Stress (solid)" | data = dset1
    surf1: Surface | expr = solid.mises
      def: Deform "Deformation" | expr = {u, w}; descr = Displacement field
  pg2: PlotGroup3D "Stress, 3D (solid)" | data = rev1
    surf1: Surface | expr = solid.mises
      def: Deform "Deformation" | revcoordsys = cylindrical; expr = {u, 0, w}; descr = Displacement field
  pg3: PlotGroup2D "Electric Potential (es)" | data = dset1; dataisaxisym = on
    surf1: Surface | expr = V
  pg4: PlotGroup3D "Electric Potential, Revolved Geometry (es)" | data = rev2
    surf1: Surface | expr = V

Exports
  anim1: Animation | giffilename = E:\PRJs\COMSOL\Diaphragm.gif
  anim2: Animation