// COMSOL Multiphysics 5.6.0.401 model "PiezoElectricalSensor.mph"
// Outline of the model tree

Geometry
  geom1 "Geometry 1" (2D, length unit µm)
    r1: Rectangle | contributeto = csel1; size = {200, 5}
    r2: Rectangle | pos = {0, 5}; size = {75, 5}
    fin: Finalize "Form Union"

Materials
  mat1: Common "Lead Zirconate Titanate (PZT-2)" on domains 2
    def "Basic"
      relpermittivity = diag{504.1, 504.1, 270}
      density = 7600[kg/m^3]
    StrainCharge "Strain-charge form"
      sE = {1.16e-011[1/Pa], -3.33e-012[1/Pa], -4.97e-012[1/Pa], 0[1/Pa], 0[1/Pa], 0[1/Pa], -3.33e-012[1/Pa], 1.16e-011[1/Pa], -4.97e-012[1/Pa], 0[1/Pa], 0[1/Pa], 0[1/Pa], -4.97e-012[1/Pa], -4.97e-012[1/Pa], 1.48e-011[1/Pa], 0[1/Pa], 0[1/Pa], 0[1/Pa], 0[1/Pa], 0[1/Pa], 0[1/Pa], 4.5e-011[1/Pa], 0[1/Pa], 0[1/Pa], 0[1/Pa], 0[1/Pa], 0[1/Pa], 0[1/Pa], 4.5e-011[1/Pa], 0[1/Pa], 0[1/Pa], 0[1/Pa], 0[1/Pa], 0[1/Pa], 0[1/Pa], 2.99e-011[1/Pa]}
      dET = {0[C/N], 0[C/N], -6e-011[C/N], 0[C/N], 0[C/N], -6e-011[C/N], 0[C/N], 0[C/N], 1.52e-010[C/N], 0[C/N], 4.4e-010[C/N], 0[C/N], 4.4e-010[C/N], 0[C/N], 0[C/N], 0[C/N], 0[C/N], 0[C/N]}
      epsilonrT = diag{990, 990, 450}
      eta_sE = {0, 0, 0, 0, 0, 0, 0, 0, 0, 0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}
      eta_dET = {0, 0, 0, 0, 0, 0, 0, 0, 0, 0, 0, 0, 0, 0, 0, 0, 0, 0}
      eta_epsilonT = 0
    StressCharge "Stress-charge form"
      cE = {1.34868e+011[Pa], 6.78883e+010[Pa], 6.80876e+010[Pa], 0[Pa], 0[Pa], 0[Pa], 6.78883e+010[Pa], 1.34868e+011[Pa], 6.80876e+010[Pa], 0[Pa], 0[Pa], 0[Pa], 6.80876e+010[Pa], 6.80876e+010[Pa], 1.13297e+011[Pa], 0[Pa], 0[Pa], 0[Pa], 0[Pa], 0[Pa], 0[Pa], 2.22222e+010[Pa], 0[Pa], 0[Pa], 0[Pa], 0[Pa], 0[Pa], 0[Pa], 2.22222e+010[Pa], 0[Pa], 0[Pa], 0[Pa], 0[Pa], 0[Pa], 0[Pa], 3.34448e+010[Pa]}
      eES = {0[C/m^2], 0[C/m^2], -1.81603[C/m^2], 0[C/m^2], 0[C/m^2], -1.81603[C/m^2], 0[C/m^2], 0[C/m^2], 9.05058[C/m^2], 0[C/m^2], 9.77778[C/m^2], 0[C/m^2], 9.77778[C/m^2], 0[C/m^2], 0[C/m^2], 0[C/m^2], 0[C/m^2], 0[C/m^2]}
      epsilonrS = diag{504.1, 504.1, 270}
      eta_cE = {0, 0, 0, 0, 0, 0, 0, 0, 0, 0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}
      eta_eES = {0, 0, 0, 0, 0, 0, 0, 0, 0, 0, 0, 0, 0, 0, 0, 0, 0, 0}
      eta_epsilonS = 0
  mat2: Common "Si - Polycrystalline silicon" on domains 1
    def "Basic"
      thermalexpansioncoefficient = 2.6e-6[1/K]
      heatcapacity = 678[J/(kg*K)]
      relpermittivity = 4.5
      density = 2320[kg/m^3]
      thermalconductivity = 34[W/(m*K)]
    Enu "Young's modulus and Poisson's ratio"
      youngsmodulus = 160e9[Pa]
      poissonsratio = 0.22

Physics
  solid: SolidMechanics on domains 1, 2
    dependent variable u = {u, v, w}
    lemm1: LinearElasticModel "Linear Elastic Material 1" (default)
    free1: Free (default)
    init1: init "Initial Values 1" (default)
    pzm1: PiezoelectricMaterialModel "Piezoelectric Material 1" on domains 2
    fix1: Fixed "Fixed Constraint 1" on boundaries 1, 3
    pl1: PointLoad on points 7 | Fp = {0, -0.01, 0}
  es: Electrostatics on all domains
    dependent variable V
    ccn1: ChargeConservation (default)
    zc1: ZeroCharge (default)
    init1: init "Initial Values 1" (default)
    ccnp1: ChargeConservationPiezo "Charge Conservation, Piezoelectric 1" on domains 2
    gnd1: Ground on boundaries 5
    fp1: FloatingPotential on boundaries 4

Multiphysics
  pze1: PiezoelectricEffect on all domains | Solid_physics = solid; Electrostatics_physics = es

Mesh
  mesh1 "Mesh 1" (physics-controlled)

Studies
  std1 "Study 1"
    stat: Stationary

Solver configurations
  sol1 "Solution 1" (study std1)
    v1: Variables "Dependent Variables 1"
    s1: Stationary "Stationary Solver 1"
      dDef: Direct
      fc1: FullyCoupled | linsolver = dDef

Datasets
  dset1: Solution | solution = sol1

Plots
  pg1: PlotGroup2D "Stress (solid)" | data = dset1
    surf1: Surface | expr = solid.mises
      def: Deform "Deformation" | expr = {u, v}; descr = Displacement field
  pg2: PlotGroup2D "Point Loads (solid)" | data = dset1
    arpt1: ArrowPoint "Point Load 1" | expr = {solid.pl1.F_Px, solid.pl1.F_Py}
      col: Color "Color Expression" | expr = solid.pl1.F_P_Mag
    surf1: Surface "Gray Surfaces" | expr = 1
      sel1: Selection on domains 1, 2
  pg3: PlotGroup2D "Electric Potential (es)" | data = dset1
    surf1: Surface | expr = V